*Heading
** Job name: vibration Model name: Model-1
** Generated by: Abaqus/CAE 2025
*Preprint, echo=NO, model=NO, history=NO, contact=NO
**
** PARTS
**
*Part, name=plaque
*Node
      1,   325.913147,   74.0868683,           0.
      2,   324.741577,   71.2584381,           0.
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*Element, type=S3
 1,  210,  141,  168
 2,  133,  221,  155
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*Element, type=S4R
  89,  262,  194,  221,  286
  90,  221,  251, 2002,  286
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*Nset, nset=_PickedSet2, internal, generate
    1,  2354,     1
*Elset, elset=_PickedSet2, internal, generate
    1,  2345,     1
** Section: tole
*Shell Section, elset=_PickedSet2, material=acier
0.5, 5
*End Part
**
**
** ASSEMBLY
**
*Assembly, name=Assembly
**
*Instance, name=plaque-1, part=plaque
*End Instance
**
*Node
      1,   71.2584381,   328.741577,           0.
*Node
      2,   71.2584381,   71.2584381,           0.
*Node
      3,   328.741577,   71.2584381,           0.
*Node
      4,   328.741577,   328.741577,           0.
*Nset, nset=_PickedSet9, internal
 1,
*Nset, nset=_PickedSet11, internal
 2,
*Nset, nset=_PickedSet13, internal
 3,
*Nset, nset=_PickedSet15, internal
 4,
*Nset, nset=_PickedSet16, internal, generate
 1,  4,  1
*Elset, elset=__PickedSurf8_E3, internal, instance=plaque-1
 99,
*Elset, elset=__PickedSurf8_E4, internal, instance=plaque-1
 157,
*Elset, elset=__PickedSurf8_E2, internal, instance=plaque-1
 177, 192, 210, 211
*Elset, elset=__PickedSurf8_E1, internal, instance=plaque-1
 187, 193
*Surface, type=ELEMENT, name=_PickedSurf8, internal
__PickedSurf8_E3, E3
__PickedSurf8_E4, E4
__PickedSurf8_E2, E2
__PickedSurf8_E1, E1
*Elset, elset=__PickedSurf10_E2, internal, instance=plaque-1
 100, 196, 198
*Elset, elset=__PickedSurf10_E3, internal, instance=plaque-1
 104, 139
*Elset, elset=__PickedSurf10_E4, internal, instance=plaque-1
 138, 174
*Elset, elset=__PickedSurf10_E1, internal, instance=plaque-1
 195,
*Surface, type=ELEMENT, name=_PickedSurf10, internal
__PickedSurf10_E2, E2
__PickedSurf10_E3, E3
__PickedSurf10_E4, E4
__PickedSurf10_E1, E1
*Elset, elset=__PickedSurf12_E3, internal, instance=plaque-1
  91, 121
*Elset, elset=__PickedSurf12_E2, internal, instance=plaque-1
  93, 184, 188, 208
*Elset, elset=__PickedSurf12_E4, internal, instance=plaque-1
 102,
*Elset, elset=__PickedSurf12_E1, internal, instance=plaque-1
 127,
*Surface, type=ELEMENT, name=_PickedSurf12, internal
__PickedSurf12_E3, E3
__PickedSurf12_E2, E2
__PickedSurf12_E4, E4
__PickedSurf12_E1, E1
*Elset, elset=__PickedSurf14_E2, internal, instance=plaque-1
 111, 126, 182, 206
*Elset, elset=__PickedSurf14_E4, internal, instance=plaque-1
 113,
*Elset, elset=__PickedSurf14_E1, internal, instance=plaque-1
 114,
*Elset, elset=__PickedSurf14_E3, internal, instance=plaque-1
 122, 145
*Surface, type=ELEMENT, name=_PickedSurf14, internal
__PickedSurf14_E2, E2
__PickedSurf14_E4, E4
__PickedSurf14_E1, E1
__PickedSurf14_E3, E3
** Constraint: Constraint-1
*Coupling, constraint name=Constraint-1, ref node=_PickedSet9, surface=_PickedSurf8
*Kinematic
** Constraint: Constraint-2
*Coupling, constraint name=Constraint-2, ref node=_PickedSet11, surface=_PickedSurf10
*Kinematic
** Constraint: Constraint-3
*Coupling, constraint name=Constraint-3, ref node=_PickedSet13, surface=_PickedSurf12
*Kinematic
** Constraint: Constraint-4
*Coupling, constraint name=Constraint-4, ref node=_PickedSet15, surface=_PickedSurf14
*Kinematic
*End Assembly
**
** MATERIALS
**
*Material, name=acier
*Density
 7.86e-09,
*Elastic
210000., 0.26
** ----------------------------------------------------------------
**
** STEP: analyse_modale
**
*Step, name=analyse_modale, nlgeom=NO, perturbation
*Frequency, eigensolver=Lanczos, sim, acoustic coupling=on, normalization=mass
, , 500., , ,
**
** BOUNDARY CONDITIONS
**
** Name: blocage Type: Symmetry/Antisymmetry/Encastre
*Boundary
_PickedSet16, ENCASTRE
**
** OUTPUT REQUESTS
**
*Restart, write, frequency=0
**
** FIELD OUTPUT: F-Output-1
**
*Output, field
*Node Output, variable=PRESELECT
**
** HISTORY OUTPUT: H-Output-1
**
*Output, history
*Energy Output, variable=ALL
*End Step
